a := 12
b := 2/4
f := a*b
f = 6
x := (a + b)/a + 4
x = 5.04167
a1 := 12
b1 := 31
p :=
    if (a1 < b1)
        a1 + b1
p = 43
k := -5, -4.75 .. 0.5
k = [-5; -4.75; -4.5; -4.25; -4; -3.75; -3.5; -3.25; -3; -2.75; -2.5; -2.25; -2; -1.75; -1.5; -1.25; -1; -0.75; -0.5; -0.25; 0; 0.25; 0.5]
f(k) := sin(k)
# [plot: f(k) vs k]
f(k) = [0.958924; 0.999293; 0.97753; 0.894989; 0.756802; 0.571561; 0.350783; 0.108195; -0.14112; -0.381661; -0.598472; -0.778073; -0.909297; -0.983986; -0.997495; -0.948985; -0.841471; -0.681639; -0.479426; -0.247404; 0; 0.247404; 0.479426]
a := [1, 2, 3; 4, 5, 6; 7, 8, 9]
a[1, 1] = 5
