x1 := -2
y1 := -4
x2 := -3
y2 := 0
x := [-2, -3, 0, 3, 2, -2, 2]
x3 := 0
y3 := 4
x4 := 3
y4 := 0
x5 := 2
y5 := -4
Y := [-4, 0, 4, 0, -4, 0, 0]
x6 := -2
y6 := 0
x7 := 2
y7 := 0
P := [x1, x2, x3, x4, x5, x6, x7; y1, y2, y3, y4, y5, y6, y6; 1, 1, 1, 1, 1, 1, 1]
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